*node, nset=nall
1, 0.,0.
3, 0.03333333,0.
5, 0.06666667,0.
8, 0.     ,0.00625
9, 0.01666667,0.00625
10, 0.03333333,0.00625
12, 0.06666667,0.00625
16, 0.01666667,0.0125
17, 0.03333333,0.0125
18, 0.05  ,0.0125
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*element,type=b32,elset=b_1
1,  1,51,52
2, 52,53,54
3, 54,55, 8
*element,type=b32,elset=b_2
4,  1,56,57
5, 57,58,59
6, 59,60,61
7, 61,62,63
8, 63,64,65
9, 65,66,67
10, 67,68,69
11, 69,70, 9
*element,type=b32,elset=b_7
12,   3,121,122
13, 122,123,124
14, 124,125, 10
*element,type=b32,elset=b_13
15,   5,191,192
16, 192,193,194
17, 194,195, 12
*element,type=b32,elset=b_21
18,   8,271,272
19, 272,273,274
20, 274,275,276
21, 276,277,278
22, 278,279,280
23, 280,281,282
24, 282,283,284
25, 284,285, 16
*element,type=b32,elset=b_23
26,   9,301,302
27, 302,303,304
28, 304,305, 16
*element,type=b32,elset=b_24
29,   9,306,307
30, 307,308,309
31, 309,310,311
32, 311,312,313
33, 313,314,315
34, 315,316,317
35, 317,318,319
36, 319,320, 17
*element,type=b32,elset=b_26
37,  10,336,337
38, 337,338,339
39, 339,340, 17
*element,type=b32,elset=b_32
40,  12,406,407
41, 407,408,409
42, 409,410, 19
*element,type=b32,elset=b_43
43,  16,521,522
44, 522,523,524
45, 524,525,526
46, 526,527,528
47, 528,529,530
48, 530,531,532
49, 532,533,534
50, 534,535, 24
*element,type=b32,elset=b_44
51,  17,536,537
52, 537,538,539
53, 539,540,541
54, 541,542,543
55, 543,544,545
56, 545,546,547
57, 547,548,549
58, 549,550, 18
*element,type=b32,elset=b_45
59,  17,551,552
60, 552,553,554
61, 554,555, 24
*element,type=b32,elset=b_46
62,  17,556,557
63, 557,558,559
64, 559,560,561
65, 561,562,563
66, 563,564,565
67, 565,566,567
68, 567,568,569
69, 569,570, 25
*element,type=b32,elset=b_47
70,  18,571,572
71, 572,573,574
72, 574,575,576
73, 576,577,578
74, 578,579,580
75, 580,581,582
76, 582,583,584
77, 584,585, 19
*element,type=b32,elset=b_48
78,  18,586,587
79, 587,588,589
80, 589,590, 25
*element,type=b32,elset=b_49
81,  18,591,592
82, 592,593,594
83, 594,595,596
84, 596,597,598
85, 598,599,600
86, 600,601,602
87, 602,603,604
88, 604,605, 26
*element,type=b32,elset=b_50
89,  19,606,607
90, 607,608,609
91, 609,610,611
92, 611,612,613
93, 613,614,615
94, 615,616,617
95, 617,618,619
96, 619,620, 20
*element,type=b32,elset=b_51
97,  19,621,622
98, 622,623,624
99, 624,625, 26
*element,type=b32,elset=b_52
100,  19,626,627
101, 627,628,629
102, 629,630,631
103, 631,632,633
104, 633,634,635
105, 635,636,637
106, 637,638,639
107, 639,640, 27
*element,type=b32,elset=b_54
108,  20,656,657
109, 657,658,659
110, 659,660, 27
*element,type=b32,elset=b_55
111,  20,661,662
112, 662,663,664
113, 664,665,666
114, 666,667,668
115, 668,669,670
116, 670,671,672
117, 672,673,674
118, 674,675, 28
*element,type=b32,elset=b_56
119,  21,676,677
120, 677,678,679
121, 679,680, 28
*element,type=b32,elset=b_65
122,  24,771,772
123, 772,773,774
124, 774,775,776
125, 776,777,778
126, 778,779,780
127, 780,781,782
128, 782,783,784
129, 784,785, 32
*element,type=b32,elset=b_66
130,  25,786,787
131, 787,788,789
132, 789,790,791
133, 791,792,793
134, 793,794,795
135, 795,796,797
136, 797,798,799
137, 799,800, 26
*element,type=b32,elset=b_67
138,  25,801,802
139, 802,803,804
140, 804,805, 32
*element,type=b32,elset=b_68
141,  25,806,807
142, 807,808,809
143, 809,810,811
144, 811,812,813
145, 813,814,815
146, 815,816,817
147, 817,818,819
148, 819,820, 33
*element,type=b32,elset=b_69
149,  26,821,822
150, 822,823,824
151, 824,825,826
152, 826,827,828
153, 828,829,830
154, 830,831,832
155, 832,833,834
156, 834,835, 27
*element,type=b32,elset=b_70
157,  26,836,837
158, 837,838,839
159, 839,840, 33
*element,type=b32,elset=b_72
160,  27,856,857
161, 857,858,859
162, 859,860,861
163, 861,862,863
164, 863,864,865
165, 865,866,867
166, 867,868,869
167, 869,870, 28
*element,type=b32,elset=b_73
168,  27,871,872
169, 872,873,874
170, 874,875, 34
*element,type=b32,elset=b_74
171,  27,876,877
172, 877,878,879
173, 879,880,881
174, 881,882,883
175, 883,884,885
176, 885,886,887
177, 887,888,889
178, 889,890, 35
*element,type=b32,elset=b_75
179,  28,891,892
180, 892,893,894
181, 894,895, 35
*element,type=b32,elset=b_80
182,  33,956,957
183, 957,958,959
184, 959,960,961
185, 961,962,963
186, 963,964,965
187, 965,966,967
188, 967,968,969
189, 969,970, 34
*element,type=b32,elset=b_81
190,  34,971,972
191, 972,973,974
192, 974,975,976
193, 976,977,978
194, 978,979,980
195, 980,981,982
196, 982,983,984
197, 984,985, 35
*elset, elset=elall
b_1,
b_2,
b_7,
b_13,
b_21,
b_23,
b_24,
b_26,
b_32,
b_43,
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*material, name=mesh_material
*elastic, type=iso
2980000000.0, 0.2
*beam section, elset=b_1, material=mesh_material, section=rect
0.008, 0.00489999999999999984
0.d0,0.d0,1.d0
*beam section, elset=b_2, material=mesh_material, section=rect
0.008, 0.00055000000000000003
0.d0,0.d0,1.d0
*beam section, elset=b_7, material=mesh_material, section=rect
0.008, 0.00125000000000000003
0.d0,0.d0,1.d0
*beam section, elset=b_13, material=mesh_material, section=rect
0.008, 0.00500000000000000010
0.d0,0.d0,1.d0
*beam section, elset=b_21, material=mesh_material, section=rect
0.008, 0.00125000000000000003
0.d0,0.d0,1.d0
*beam section, elset=b_23, material=mesh_material, section=rect
0.008, 0.00355000000000000020
0.d0,0.d0,1.d0
*beam section, elset=b_24, material=mesh_material, section=rect
0.008, 0.00125000000000000003
0.d0,0.d0,1.d0
*beam section, elset=b_26, material=mesh_material, section=rect
0.008, 0.00125000000000000003
0.d0,0.d0,1.d0
*beam section, elset=b_32, material=mesh_material, section=rect
0.008, 0.00500000000000000010
0.d0,0.d0,1.d0
*beam section, elset=b_43, material=mesh_material, section=rect
0.008, 0.00125000000000000003
0.d0,0.d0,1.d0
*beam section, elset=b_44, material=mesh_material, section=rect
0.008, 0.00125000000000000003
0.d0,0.d0,1.d0
*beam section, elset=b_45, material=mesh_material, section=rect
0.008, 0.00355000000000000020
0.d0,0.d0,1.d0
*beam section, elset=b_46, material=mesh_material, section=rect
0.008, 0.00355000000000000020
0.d0,0.d0,1.d0
*beam section, elset=b_47, material=mesh_material, section=rect
0.008, 0.00500000000000000010
0.d0,0.d0,1.d0
*beam section, elset=b_48, material=mesh_material, section=rect
0.008, 0.00489999999999999984
0.d0,0.d0,1.d0
*beam section, elset=b_49, material=mesh_material, section=rect
0.008, 0.00355000000000000020
0.d0,0.d0,1.d0
*beam section, elset=b_50, material=mesh_material, section=rect
0.008, 0.00489999999999999984
0.d0,0.d0,1.d0
*beam section, elset=b_51, material=mesh_material, section=rect
0.008, 0.00355000000000000020
0.d0,0.d0,1.d0
*beam section, elset=b_52, material=mesh_material, section=rect
0.008, 0.00489999999999999984
0.d0,0.d0,1.d0
*beam section, elset=b_54, material=mesh_material, section=rect
0.008, 0.00125000000000000003
0.d0,0.d0,1.d0
*beam section, elset=b_55, material=mesh_material, section=rect
0.008, 0.00145000000000000012
0.d0,0.d0,1.d0
*beam section, elset=b_56, material=mesh_material, section=rect
0.008, 0.00125000000000000003
0.d0,0.d0,1.d0
*beam section, elset=b_65, material=mesh_material, section=rect
0.008, 0.00355000000000000020
0.d0,0.d0,1.d0
*beam section, elset=b_66, material=mesh_material, section=rect
0.008, 0.00125000000000000003
0.d0,0.d0,1.d0
*beam section, elset=b_67, material=mesh_material, section=rect
0.008, 0.00125000000000000003
0.d0,0.d0,1.d0
*beam section, elset=b_68, material=mesh_material, section=rect
0.008, 0.00489999999999999984
0.d0,0.d0,1.d0
*beam section, elset=b_69, material=mesh_material, section=rect
0.008, 0.00125000000000000003
0.d0,0.d0,1.d0
*beam section, elset=b_70, material=mesh_material, section=rect
0.008, 0.00145000000000000012
0.d0,0.d0,1.d0
*beam section, elset=b_72, material=mesh_material, section=rect
0.008, 0.00145000000000000012
0.d0,0.d0,1.d0
*beam section, elset=b_73, material=mesh_material, section=rect
0.008, 0.00355000000000000020
0.d0,0.d0,1.d0
*beam section, elset=b_74, material=mesh_material, section=rect
0.008, 0.00145000000000000012
0.d0,0.d0,1.d0
*beam section, elset=b_75, material=mesh_material, section=rect
0.008, 0.00145000000000000012
0.d0,0.d0,1.d0
*beam section, elset=b_80, material=mesh_material, section=rect
0.008, 0.00355000000000000020
0.d0,0.d0,1.d0
*beam section, elset=b_81, material=mesh_material, section=rect
0.008, 0.00145000000000000012
0.d0,0.d0,1.d0
*boundary
1, 3,5
3, 3,5
5, 3,5
8, 3,5
9, 3,5
10, 3,5
12, 3,5
16, 3,5
17, 3,5
18, 3,5
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*boundary
2, 2
2, 6
3, 2
3, 6
4, 2
4, 6
5, 2
5, 6
1, 2
1, 6
29, 1
29, 2
32, 1
32, 2
*step, nlgeom
*static
*cload
1, 1, 100.0
20, 2, 5.0
21, 2, 5.0
*el print, elset=elall
s
*node file, output=2d, nset=nall
u
*el file, elset=elall
s,noe
*end step
