*node, nset=nall
1, 0.,0.
2, 0.01666667,0.
3, 0.03333333,0.
5, 0.06666667,0.
8, 0.     ,0.00625
9, 0.01666667,0.00625
10, 0.03333333,0.00625
12, 0.06666667,0.00625
16, 0.01666667,0.0125
17, 0.03333333,0.0125
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*element,type=b32,elset=b_1
1,  1,51,52
2, 52,53,54
3, 54,55, 8
*element,type=b32,elset=b_2
4,  1,56,57
5, 57,58,59
6, 59,60,61
7, 61,62,63
8, 63,64,65
9, 65,66,67
10, 67,68,69
11, 69,70, 9
*element,type=b32,elset=b_4
12,  2,86,87
13, 87,88,89
14, 89,90, 9
*element,type=b32,elset=b_7
15,   3,121,122
16, 122,123,124
17, 124,125, 10
*element,type=b32,elset=b_13
18,   5,191,192
19, 192,193,194
20, 194,195, 12
*element,type=b32,elset=b_21
21,   8,271,272
22, 272,273,274
23, 274,275,276
24, 276,277,278
25, 278,279,280
26, 280,281,282
27, 282,283,284
28, 284,285, 16
*element,type=b32,elset=b_23
29,   9,301,302
30, 302,303,304
31, 304,305, 16
*element,type=b32,elset=b_24
32,   9,306,307
33, 307,308,309
34, 309,310,311
35, 311,312,313
36, 313,314,315
37, 315,316,317
38, 317,318,319
39, 319,320, 17
*element,type=b32,elset=b_26
40,  10,336,337
41, 337,338,339
42, 339,340, 17
*element,type=b32,elset=b_32
43,  12,406,407
44, 407,408,409
45, 409,410, 19
*element,type=b32,elset=b_43
46,  16,521,522
47, 522,523,524
48, 524,525,526
49, 526,527,528
50, 528,529,530
51, 530,531,532
52, 532,533,534
53, 534,535, 24
*element,type=b32,elset=b_44
54,  17,536,537
55, 537,538,539
56, 539,540,541
57, 541,542,543
58, 543,544,545
59, 545,546,547
60, 547,548,549
61, 549,550, 18
*element,type=b32,elset=b_45
62,  17,551,552
63, 552,553,554
64, 554,555, 24
*element,type=b32,elset=b_46
65,  17,556,557
66, 557,558,559
67, 559,560,561
68, 561,562,563
69, 563,564,565
70, 565,566,567
71, 567,568,569
72, 569,570, 25
*element,type=b32,elset=b_47
73,  18,571,572
74, 572,573,574
75, 574,575,576
76, 576,577,578
77, 578,579,580
78, 580,581,582
79, 582,583,584
80, 584,585, 19
*element,type=b32,elset=b_48
81,  18,586,587
82, 587,588,589
83, 589,590, 25
*element,type=b32,elset=b_49
84,  18,591,592
85, 592,593,594
86, 594,595,596
87, 596,597,598
88, 598,599,600
89, 600,601,602
90, 602,603,604
91, 604,605, 26
*element,type=b32,elset=b_50
92,  19,606,607
93, 607,608,609
94, 609,610,611
95, 611,612,613
96, 613,614,615
97, 615,616,617
98, 617,618,619
99, 619,620, 20
*element,type=b32,elset=b_51
100,  19,621,622
101, 622,623,624
102, 624,625, 26
*element,type=b32,elset=b_52
103,  19,626,627
104, 627,628,629
105, 629,630,631
106, 631,632,633
107, 633,634,635
108, 635,636,637
109, 637,638,639
110, 639,640, 27
*element,type=b32,elset=b_54
111,  20,656,657
112, 657,658,659
113, 659,660, 27
*element,type=b32,elset=b_55
114,  20,661,662
115, 662,663,664
116, 664,665,666
117, 666,667,668
118, 668,669,670
119, 670,671,672
120, 672,673,674
121, 674,675, 28
*element,type=b32,elset=b_56
122,  21,676,677
123, 677,678,679
124, 679,680, 28
*element,type=b32,elset=b_65
125,  24,771,772
126, 772,773,774
127, 774,775,776
128, 776,777,778
129, 778,779,780
130, 780,781,782
131, 782,783,784
132, 784,785, 32
*element,type=b32,elset=b_66
133,  25,786,787
134, 787,788,789
135, 789,790,791
136, 791,792,793
137, 793,794,795
138, 795,796,797
139, 797,798,799
140, 799,800, 26
*element,type=b32,elset=b_67
141,  25,801,802
142, 802,803,804
143, 804,805, 32
*element,type=b32,elset=b_68
144,  25,806,807
145, 807,808,809
146, 809,810,811
147, 811,812,813
148, 813,814,815
149, 815,816,817
150, 817,818,819
151, 819,820, 33
*element,type=b32,elset=b_69
152,  26,821,822
153, 822,823,824
154, 824,825,826
155, 826,827,828
156, 828,829,830
157, 830,831,832
158, 832,833,834
159, 834,835, 27
*element,type=b32,elset=b_70
160,  26,836,837
161, 837,838,839
162, 839,840, 33
*element,type=b32,elset=b_72
163,  27,856,857
164, 857,858,859
165, 859,860,861
166, 861,862,863
167, 863,864,865
168, 865,866,867
169, 867,868,869
170, 869,870, 28
*element,type=b32,elset=b_73
171,  27,871,872
172, 872,873,874
173, 874,875, 34
*element,type=b32,elset=b_74
174,  27,876,877
175, 877,878,879
176, 879,880,881
177, 881,882,883
178, 883,884,885
179, 885,886,887
180, 887,888,889
181, 889,890, 35
*element,type=b32,elset=b_75
182,  28,891,892
183, 892,893,894
184, 894,895, 35
*element,type=b32,elset=b_80
185,  33,956,957
186, 957,958,959
187, 959,960,961
188, 961,962,963
189, 963,964,965
190, 965,966,967
191, 967,968,969
192, 969,970, 34
*element,type=b32,elset=b_81
193,  34,971,972
194, 972,973,974
195, 974,975,976
196, 976,977,978
197, 978,979,980
198, 980,981,982
199, 982,983,984
200, 984,985, 35
*elset, elset=elall
b_1,
b_2,
b_4,
b_7,
b_13,
b_21,
b_23,
b_24,
b_26,
b_32,
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*material, name=mesh_material
*elastic, type=iso
2980000000.0, 0.2
*beam section, elset=b_1, material=mesh_material, section=rect
0.008, 0.00480000000000000045
0.d0,0.d0,1.d0
*beam section, elset=b_2, material=mesh_material, section=rect
0.008, 0.00045000000000000004
0.d0,0.d0,1.d0
*beam section, elset=b_4, material=mesh_material, section=rect
0.008, 0.00005000000000000000
0.d0,0.d0,1.d0
*beam section, elset=b_7, material=mesh_material, section=rect
0.008, 0.00114999999999999998
0.d0,0.d0,1.d0
*beam section, elset=b_13, material=mesh_material, section=rect
0.008, 0.00500000000000000010
0.d0,0.d0,1.d0
*beam section, elset=b_21, material=mesh_material, section=rect
0.008, 0.00114999999999999998
0.d0,0.d0,1.d0
*beam section, elset=b_23, material=mesh_material, section=rect
0.008, 0.00345000000000000038
0.d0,0.d0,1.d0
*beam section, elset=b_24, material=mesh_material, section=rect
0.008, 0.00114999999999999998
0.d0,0.d0,1.d0
*beam section, elset=b_26, material=mesh_material, section=rect
0.008, 0.00114999999999999998
0.d0,0.d0,1.d0
*beam section, elset=b_32, material=mesh_material, section=rect
0.008, 0.00500000000000000010
0.d0,0.d0,1.d0
*beam section, elset=b_43, material=mesh_material, section=rect
0.008, 0.00114999999999999998
0.d0,0.d0,1.d0
*beam section, elset=b_44, material=mesh_material, section=rect
0.008, 0.00114999999999999998
0.d0,0.d0,1.d0
*beam section, elset=b_45, material=mesh_material, section=rect
0.008, 0.00345000000000000038
0.d0,0.d0,1.d0
*beam section, elset=b_46, material=mesh_material, section=rect
0.008, 0.00345000000000000038
0.d0,0.d0,1.d0
*beam section, elset=b_47, material=mesh_material, section=rect
0.008, 0.00500000000000000010
0.d0,0.d0,1.d0
*beam section, elset=b_48, material=mesh_material, section=rect
0.008, 0.00480000000000000045
0.d0,0.d0,1.d0
*beam section, elset=b_49, material=mesh_material, section=rect
0.008, 0.00345000000000000038
0.d0,0.d0,1.d0
*beam section, elset=b_50, material=mesh_material, section=rect
0.008, 0.00480000000000000045
0.d0,0.d0,1.d0
*beam section, elset=b_51, material=mesh_material, section=rect
0.008, 0.00345000000000000038
0.d0,0.d0,1.d0
*beam section, elset=b_52, material=mesh_material, section=rect
0.008, 0.00480000000000000045
0.d0,0.d0,1.d0
*beam section, elset=b_54, material=mesh_material, section=rect
0.008, 0.00114999999999999998
0.d0,0.d0,1.d0
*beam section, elset=b_55, material=mesh_material, section=rect
0.008, 0.00155000000000000016
0.d0,0.d0,1.d0
*beam section, elset=b_56, material=mesh_material, section=rect
0.008, 0.00114999999999999998
0.d0,0.d0,1.d0
*beam section, elset=b_65, material=mesh_material, section=rect
0.008, 0.00345000000000000038
0.d0,0.d0,1.d0
*beam section, elset=b_66, material=mesh_material, section=rect
0.008, 0.00114999999999999998
0.d0,0.d0,1.d0
*beam section, elset=b_67, material=mesh_material, section=rect
0.008, 0.00114999999999999998
0.d0,0.d0,1.d0
*beam section, elset=b_68, material=mesh_material, section=rect
0.008, 0.00480000000000000045
0.d0,0.d0,1.d0
*beam section, elset=b_69, material=mesh_material, section=rect
0.008, 0.00114999999999999998
0.d0,0.d0,1.d0
*beam section, elset=b_70, material=mesh_material, section=rect
0.008, 0.00155000000000000016
0.d0,0.d0,1.d0
*beam section, elset=b_72, material=mesh_material, section=rect
0.008, 0.00155000000000000016
0.d0,0.d0,1.d0
*beam section, elset=b_73, material=mesh_material, section=rect
0.008, 0.00345000000000000038
0.d0,0.d0,1.d0
*beam section, elset=b_74, material=mesh_material, section=rect
0.008, 0.00155000000000000016
0.d0,0.d0,1.d0
*beam section, elset=b_75, material=mesh_material, section=rect
0.008, 0.00155000000000000016
0.d0,0.d0,1.d0
*beam section, elset=b_80, material=mesh_material, section=rect
0.008, 0.00345000000000000038
0.d0,0.d0,1.d0
*beam section, elset=b_81, material=mesh_material, section=rect
0.008, 0.00155000000000000016
0.d0,0.d0,1.d0
*boundary
1, 3,5
2, 3,5
3, 3,5
5, 3,5
8, 3,5
9, 3,5
10, 3,5
12, 3,5
16, 3,5
17, 3,5
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*boundary
2, 2
2, 6
3, 2
3, 6
4, 2
4, 6
5, 2
5, 6
1, 2
1, 6
29, 1
29, 2
32, 1
32, 2
*step, nlgeom
*static
*cload
1, 1, 100.0
20, 2, 5.0
21, 2, 5.0
*el print, elset=elall
s
*node file, output=2d, nset=nall
u
*el file, elset=elall
s,noe
*end step
