*node, nset=nall
1, 0.,0.
2, 0.01666667,0.
3, 0.03333333,0.
5, 0.06666667,0.
8, 0.     ,0.00625
9, 0.01666667,0.00625
10, 0.03333333,0.00625
12, 0.06666667,0.00625
15, 0.    ,0.0125
16, 0.01666667,0.0125
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*element,type=b32,elset=b_1
1,  1,51,52
2, 52,53,54
3, 54,55, 8
*element,type=b32,elset=b_2
4,  1,56,57
5, 57,58,59
6, 59,60,61
7, 61,62,63
8, 63,64,65
9, 65,66,67
10, 67,68,69
11, 69,70, 9
*element,type=b32,elset=b_4
12,  2,86,87
13, 87,88,89
14, 89,90, 9
*element,type=b32,elset=b_7
15,   3,121,122
16, 122,123,124
17, 124,125, 10
*element,type=b32,elset=b_13
18,   5,191,192
19, 192,193,194
20, 194,195, 12
*element,type=b32,elset=b_20
21,   8,266,267
22, 267,268,269
23, 269,270, 15
*element,type=b32,elset=b_21
24,   8,271,272
25, 272,273,274
26, 274,275,276
27, 276,277,278
28, 278,279,280
29, 280,281,282
30, 282,283,284
31, 284,285, 16
*element,type=b32,elset=b_23
32,   9,301,302
33, 302,303,304
34, 304,305, 16
*element,type=b32,elset=b_24
35,   9,306,307
36, 307,308,309
37, 309,310,311
38, 311,312,313
39, 313,314,315
40, 315,316,317
41, 317,318,319
42, 319,320, 17
*element,type=b32,elset=b_26
43,  10,336,337
44, 337,338,339
45, 339,340, 17
*element,type=b32,elset=b_32
46,  12,406,407
47, 407,408,409
48, 409,410, 19
*element,type=b32,elset=b_43
49,  16,521,522
50, 522,523,524
51, 524,525,526
52, 526,527,528
53, 528,529,530
54, 530,531,532
55, 532,533,534
56, 534,535, 24
*element,type=b32,elset=b_44
57,  17,536,537
58, 537,538,539
59, 539,540,541
60, 541,542,543
61, 543,544,545
62, 545,546,547
63, 547,548,549
64, 549,550, 18
*element,type=b32,elset=b_45
65,  17,551,552
66, 552,553,554
67, 554,555, 24
*element,type=b32,elset=b_46
68,  17,556,557
69, 557,558,559
70, 559,560,561
71, 561,562,563
72, 563,564,565
73, 565,566,567
74, 567,568,569
75, 569,570, 25
*element,type=b32,elset=b_47
76,  18,571,572
77, 572,573,574
78, 574,575,576
79, 576,577,578
80, 578,579,580
81, 580,581,582
82, 582,583,584
83, 584,585, 19
*element,type=b32,elset=b_48
84,  18,586,587
85, 587,588,589
86, 589,590, 25
*element,type=b32,elset=b_49
87,  18,591,592
88, 592,593,594
89, 594,595,596
90, 596,597,598
91, 598,599,600
92, 600,601,602
93, 602,603,604
94, 604,605, 26
*element,type=b32,elset=b_50
95,  19,606,607
96, 607,608,609
97, 609,610,611
98, 611,612,613
99, 613,614,615
100, 615,616,617
101, 617,618,619
102, 619,620, 20
*element,type=b32,elset=b_51
103,  19,621,622
104, 622,623,624
105, 624,625, 26
*element,type=b32,elset=b_52
106,  19,626,627
107, 627,628,629
108, 629,630,631
109, 631,632,633
110, 633,634,635
111, 635,636,637
112, 637,638,639
113, 639,640, 27
*element,type=b32,elset=b_54
114,  20,656,657
115, 657,658,659
116, 659,660, 27
*element,type=b32,elset=b_55
117,  20,661,662
118, 662,663,664
119, 664,665,666
120, 666,667,668
121, 668,669,670
122, 670,671,672
123, 672,673,674
124, 674,675, 28
*element,type=b32,elset=b_56
125,  21,676,677
126, 677,678,679
127, 679,680, 28
*element,type=b32,elset=b_65
128,  24,771,772
129, 772,773,774
130, 774,775,776
131, 776,777,778
132, 778,779,780
133, 780,781,782
134, 782,783,784
135, 784,785, 32
*element,type=b32,elset=b_66
136,  25,786,787
137, 787,788,789
138, 789,790,791
139, 791,792,793
140, 793,794,795
141, 795,796,797
142, 797,798,799
143, 799,800, 26
*element,type=b32,elset=b_67
144,  25,801,802
145, 802,803,804
146, 804,805, 32
*element,type=b32,elset=b_68
147,  25,806,807
148, 807,808,809
149, 809,810,811
150, 811,812,813
151, 813,814,815
152, 815,816,817
153, 817,818,819
154, 819,820, 33
*element,type=b32,elset=b_69
155,  26,821,822
156, 822,823,824
157, 824,825,826
158, 826,827,828
159, 828,829,830
160, 830,831,832
161, 832,833,834
162, 834,835, 27
*element,type=b32,elset=b_70
163,  26,836,837
164, 837,838,839
165, 839,840, 33
*element,type=b32,elset=b_72
166,  27,856,857
167, 857,858,859
168, 859,860,861
169, 861,862,863
170, 863,864,865
171, 865,866,867
172, 867,868,869
173, 869,870, 28
*element,type=b32,elset=b_73
174,  27,871,872
175, 872,873,874
176, 874,875, 34
*element,type=b32,elset=b_74
177,  27,876,877
178, 877,878,879
179, 879,880,881
180, 881,882,883
181, 883,884,885
182, 885,886,887
183, 887,888,889
184, 889,890, 35
*element,type=b32,elset=b_75
185,  28,891,892
186, 892,893,894
187, 894,895, 35
*element,type=b32,elset=b_80
188,  33,956,957
189, 957,958,959
190, 959,960,961
191, 961,962,963
192, 963,964,965
193, 965,966,967
194, 967,968,969
195, 969,970, 34
*element,type=b32,elset=b_81
196,  34,971,972
197, 972,973,974
198, 974,975,976
199, 976,977,978
200, 978,979,980
201, 980,981,982
202, 982,983,984
203, 984,985, 35
*elset, elset=elall
b_1,
b_2,
b_4,
b_7,
b_13,
b_20,
b_21,
b_23,
b_24,
b_26,
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*material, name=mesh_material
*elastic, type=iso
2980000000.0, 0.2
*beam section, elset=b_1, material=mesh_material, section=rect
0.008, 0.00470000000000000018
0.d0,0.d0,1.d0
*beam section, elset=b_2, material=mesh_material, section=rect
0.008, 0.00035000000000000000
0.d0,0.d0,1.d0
*beam section, elset=b_4, material=mesh_material, section=rect
0.008, 0.00015000000000000001
0.d0,0.d0,1.d0
*beam section, elset=b_7, material=mesh_material, section=rect
0.008, 0.00105000000000000015
0.d0,0.d0,1.d0
*beam section, elset=b_13, material=mesh_material, section=rect
0.008, 0.00500000000000000010
0.d0,0.d0,1.d0
*beam section, elset=b_20, material=mesh_material, section=rect
0.008, 0.00005000000000000000
0.d0,0.d0,1.d0
*beam section, elset=b_21, material=mesh_material, section=rect
0.008, 0.00105000000000000015
0.d0,0.d0,1.d0
*beam section, elset=b_23, material=mesh_material, section=rect
0.008, 0.00335000000000000011
0.d0,0.d0,1.d0
*beam section, elset=b_24, material=mesh_material, section=rect
0.008, 0.00105000000000000015
0.d0,0.d0,1.d0
*beam section, elset=b_26, material=mesh_material, section=rect
0.008, 0.00105000000000000015
0.d0,0.d0,1.d0
*beam section, elset=b_32, material=mesh_material, section=rect
0.008, 0.00500000000000000010
0.d0,0.d0,1.d0
*beam section, elset=b_43, material=mesh_material, section=rect
0.008, 0.00105000000000000015
0.d0,0.d0,1.d0
*beam section, elset=b_44, material=mesh_material, section=rect
0.008, 0.00105000000000000015
0.d0,0.d0,1.d0
*beam section, elset=b_45, material=mesh_material, section=rect
0.008, 0.00335000000000000011
0.d0,0.d0,1.d0
*beam section, elset=b_46, material=mesh_material, section=rect
0.008, 0.00335000000000000011
0.d0,0.d0,1.d0
*beam section, elset=b_47, material=mesh_material, section=rect
0.008, 0.00500000000000000010
0.d0,0.d0,1.d0
*beam section, elset=b_48, material=mesh_material, section=rect
0.008, 0.00470000000000000018
0.d0,0.d0,1.d0
*beam section, elset=b_49, material=mesh_material, section=rect
0.008, 0.00335000000000000011
0.d0,0.d0,1.d0
*beam section, elset=b_50, material=mesh_material, section=rect
0.008, 0.00470000000000000018
0.d0,0.d0,1.d0
*beam section, elset=b_51, material=mesh_material, section=rect
0.008, 0.00335000000000000011
0.d0,0.d0,1.d0
*beam section, elset=b_52, material=mesh_material, section=rect
0.008, 0.00470000000000000018
0.d0,0.d0,1.d0
*beam section, elset=b_54, material=mesh_material, section=rect
0.008, 0.00105000000000000015
0.d0,0.d0,1.d0
*beam section, elset=b_55, material=mesh_material, section=rect
0.008, 0.00145000000000000012
0.d0,0.d0,1.d0
*beam section, elset=b_56, material=mesh_material, section=rect
0.008, 0.00125000000000000003
0.d0,0.d0,1.d0
*beam section, elset=b_65, material=mesh_material, section=rect
0.008, 0.00335000000000000011
0.d0,0.d0,1.d0
*beam section, elset=b_66, material=mesh_material, section=rect
0.008, 0.00105000000000000015
0.d0,0.d0,1.d0
*beam section, elset=b_67, material=mesh_material, section=rect
0.008, 0.00100000000000000002
0.d0,0.d0,1.d0
*beam section, elset=b_68, material=mesh_material, section=rect
0.008, 0.00470000000000000018
0.d0,0.d0,1.d0
*beam section, elset=b_69, material=mesh_material, section=rect
0.008, 0.00105000000000000015
0.d0,0.d0,1.d0
*beam section, elset=b_70, material=mesh_material, section=rect
0.008, 0.00164999999999999999
0.d0,0.d0,1.d0
*beam section, elset=b_72, material=mesh_material, section=rect
0.008, 0.00145000000000000012
0.d0,0.d0,1.d0
*beam section, elset=b_73, material=mesh_material, section=rect
0.008, 0.00335000000000000011
0.d0,0.d0,1.d0
*beam section, elset=b_74, material=mesh_material, section=rect
0.008, 0.00164999999999999999
0.d0,0.d0,1.d0
*beam section, elset=b_75, material=mesh_material, section=rect
0.008, 0.00164999999999999999
0.d0,0.d0,1.d0
*beam section, elset=b_80, material=mesh_material, section=rect
0.008, 0.00355000000000000020
0.d0,0.d0,1.d0
*beam section, elset=b_81, material=mesh_material, section=rect
0.008, 0.00164999999999999999
0.d0,0.d0,1.d0
*boundary
1, 3,5
2, 3,5
3, 3,5
5, 3,5
8, 3,5
9, 3,5
10, 3,5
12, 3,5
15, 3,5
16, 3,5
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*boundary
2, 2
2, 6
3, 2
3, 6
4, 2
4, 6
5, 2
5, 6
1, 2
1, 6
29, 1
29, 2
32, 1
32, 2
*step, nlgeom
*static
*cload
1, 1, 100.0
20, 2, 5.0
21, 2, 5.0
*el print, elset=elall
s
*node file, output=2d, nset=nall
u
*el file, elset=elall
s,noe
*end step
