*node, nset=nall
1, 0.,0.
2, 0.01666667,0.
3, 0.03333333,0.
4, 0.05,0.
5, 0.06666667,0.
8, 0.     ,0.00625
9, 0.01666667,0.00625
10, 0.03333333,0.00625
11, 0.05   ,0.00625
12, 0.06666667,0.00625
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*element,type=b32,elset=b_0
1,  1,36,37
2, 37,38,39
3, 39,40,41
4, 41,42,43
5, 43,44,45
6, 45,46,47
7, 47,48,49
8, 49,50, 2
*element,type=b32,elset=b_1
9,  1,51,52
10, 52,53,54
11, 54,55, 8
*element,type=b32,elset=b_2
12,  1,56,57
13, 57,58,59
14, 59,60,61
15, 61,62,63
16, 63,64,65
17, 65,66,67
18, 67,68,69
19, 69,70, 9
*element,type=b32,elset=b_4
20,  2,86,87
21, 87,88,89
22, 89,90, 9
*element,type=b32,elset=b_7
23,   3,121,122
24, 122,123,124
25, 124,125, 10
*element,type=b32,elset=b_11
26,   4,161,162
27, 162,163,164
28, 164,165,166
29, 166,167,168
30, 168,169,170
31, 170,171,172
32, 172,173,174
33, 174,175, 12
*element,type=b32,elset=b_13
34,   5,191,192
35, 192,193,194
36, 194,195, 12
*element,type=b32,elset=b_19
37,   8,251,252
38, 252,253,254
39, 254,255,256
40, 256,257,258
41, 258,259,260
42, 260,261,262
43, 262,263,264
44, 264,265,  9
*element,type=b32,elset=b_20
45,   8,266,267
46, 267,268,269
47, 269,270, 15
*element,type=b32,elset=b_21
48,   8,271,272
49, 272,273,274
50, 274,275,276
51, 276,277,278
52, 278,279,280
53, 280,281,282
54, 282,283,284
55, 284,285, 16
*element,type=b32,elset=b_22
56,   9,286,287
57, 287,288,289
58, 289,290,291
59, 291,292,293
60, 293,294,295
61, 295,296,297
62, 297,298,299
63, 299,300, 10
*element,type=b32,elset=b_23
64,   9,301,302
65, 302,303,304
66, 304,305, 16
*element,type=b32,elset=b_24
67,   9,306,307
68, 307,308,309
69, 309,310,311
70, 311,312,313
71, 313,314,315
72, 315,316,317
73, 317,318,319
74, 319,320, 17
*element,type=b32,elset=b_26
75,  10,336,337
76, 337,338,339
77, 339,340, 17
*element,type=b32,elset=b_28
78,  11,356,357
79, 357,358,359
80, 359,360,361
81, 361,362,363
82, 363,364,365
83, 365,366,367
84, 367,368,369
85, 369,370, 12
*element,type=b32,elset=b_30
86,  11,376,377
87, 377,378,379
88, 379,380,381
89, 381,382,383
90, 383,384,385
91, 385,386,387
92, 387,388,389
93, 389,390, 19
*element,type=b32,elset=b_32
94,  12,406,407
95, 407,408,409
96, 409,410, 19
*element,type=b32,elset=b_41
97,  16,501,502
98, 502,503,504
99, 504,505,506
100, 506,507,508
101, 508,509,510
102, 510,511,512
103, 512,513,514
104, 514,515, 17
*element,type=b32,elset=b_43
105,  16,521,522
106, 522,523,524
107, 524,525,526
108, 526,527,528
109, 528,529,530
110, 530,531,532
111, 532,533,534
112, 534,535, 24
*element,type=b32,elset=b_44
113,  17,536,537
114, 537,538,539
115, 539,540,541
116, 541,542,543
117, 543,544,545
118, 545,546,547
119, 547,548,549
120, 549,550, 18
*element,type=b32,elset=b_45
121,  17,551,552
122, 552,553,554
123, 554,555, 24
*element,type=b32,elset=b_46
124,  17,556,557
125, 557,558,559
126, 559,560,561
127, 561,562,563
128, 563,564,565
129, 565,566,567
130, 567,568,569
131, 569,570, 25
*element,type=b32,elset=b_47
132,  18,571,572
133, 572,573,574
134, 574,575,576
135, 576,577,578
136, 578,579,580
137, 580,581,582
138, 582,583,584
139, 584,585, 19
*element,type=b32,elset=b_48
140,  18,586,587
141, 587,588,589
142, 589,590, 25
*element,type=b32,elset=b_49
143,  18,591,592
144, 592,593,594
145, 594,595,596
146, 596,597,598
147, 598,599,600
148, 600,601,602
149, 602,603,604
150, 604,605, 26
*element,type=b32,elset=b_50
151,  19,606,607
152, 607,608,609
153, 609,610,611
154, 611,612,613
155, 613,614,615
156, 615,616,617
157, 617,618,619
158, 619,620, 20
*element,type=b32,elset=b_51
159,  19,621,622
160, 622,623,624
161, 624,625, 26
*element,type=b32,elset=b_52
162,  19,626,627
163, 627,628,629
164, 629,630,631
165, 631,632,633
166, 633,634,635
167, 635,636,637
168, 637,638,639
169, 639,640, 27
*element,type=b32,elset=b_53
170,  20,641,642
171, 642,643,644
172, 644,645,646
173, 646,647,648
174, 648,649,650
175, 650,651,652
176, 652,653,654
177, 654,655, 21
*element,type=b32,elset=b_54
178,  20,656,657
179, 657,658,659
180, 659,660, 27
*element,type=b32,elset=b_55
181,  20,661,662
182, 662,663,664
183, 664,665,666
184, 666,667,668
185, 668,669,670
186, 670,671,672
187, 672,673,674
188, 674,675, 28
*element,type=b32,elset=b_56
189,  21,676,677
190, 677,678,679
191, 679,680, 28
*element,type=b32,elset=b_60
192,  23,716,717
193, 717,718,719
194, 719,720,721
195, 721,722,723
196, 723,724,725
197, 725,726,727
198, 727,728,729
199, 729,730, 24
*element,type=b32,elset=b_64
200,  24,766,767
201, 767,768,769
202, 769,770, 31
*element,type=b32,elset=b_65
203,  24,771,772
204, 772,773,774
205, 774,775,776
206, 776,777,778
207, 778,779,780
208, 780,781,782
209, 782,783,784
210, 784,785, 32
*element,type=b32,elset=b_66
211,  25,786,787
212, 787,788,789
213, 789,790,791
214, 791,792,793
215, 793,794,795
216, 795,796,797
217, 797,798,799
218, 799,800, 26
*element,type=b32,elset=b_67
219,  25,801,802
220, 802,803,804
221, 804,805, 32
*element,type=b32,elset=b_68
222,  25,806,807
223, 807,808,809
224, 809,810,811
225, 811,812,813
226, 813,814,815
227, 815,816,817
228, 817,818,819
229, 819,820, 33
*element,type=b32,elset=b_69
230,  26,821,822
231, 822,823,824
232, 824,825,826
233, 826,827,828
234, 828,829,830
235, 830,831,832
236, 832,833,834
237, 834,835, 27
*element,type=b32,elset=b_70
238,  26,836,837
239, 837,838,839
240, 839,840, 33
*element,type=b32,elset=b_71
241,  26,841,842
242, 842,843,844
243, 844,845,846
244, 846,847,848
245, 848,849,850
246, 850,851,852
247, 852,853,854
248, 854,855, 34
*element,type=b32,elset=b_72
249,  27,856,857
250, 857,858,859
251, 859,860,861
252, 861,862,863
253, 863,864,865
254, 865,866,867
255, 867,868,869
256, 869,870, 28
*element,type=b32,elset=b_73
257,  27,871,872
258, 872,873,874
259, 874,875, 34
*element,type=b32,elset=b_74
260,  27,876,877
261, 877,878,879
262, 879,880,881
263, 881,882,883
264, 883,884,885
265, 885,886,887
266, 887,888,889
267, 889,890, 35
*element,type=b32,elset=b_75
268,  28,891,892
269, 892,893,894
270, 894,895, 35
*element,type=b32,elset=b_78
271,  31,926,927
272, 927,928,929
273, 929,930,931
274, 931,932,933
275, 933,934,935
276, 935,936,937
277, 937,938,939
278, 939,940, 32
*element,type=b32,elset=b_80
279,  33,956,957
280, 957,958,959
281, 959,960,961
282, 961,962,963
283, 963,964,965
284, 965,966,967
285, 967,968,969
286, 969,970, 34
*element,type=b32,elset=b_81
287,  34,971,972
288, 972,973,974
289, 974,975,976
290, 976,977,978
291, 978,979,980
292, 980,981,982
293, 982,983,984
294, 984,985, 35
*elset, elset=elall
b_0,
b_1,
b_2,
b_4,
b_7,
b_11,
b_13,
b_19,
b_20,
b_21,
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*material, name=mesh_material
*elastic, type=iso
2980000000.0, 0.2
*beam section, elset=b_0, material=mesh_material, section=rect
0.008, 0.00005000000000000000
0.d0,0.d0,1.d0
*beam section, elset=b_1, material=mesh_material, section=rect
0.008, 0.00485000000000000014
0.d0,0.d0,1.d0
*beam section, elset=b_2, material=mesh_material, section=rect
0.008, 0.00050000000000000001
0.d0,0.d0,1.d0
*beam section, elset=b_4, material=mesh_material, section=rect
0.008, 0.00005000000000000000
0.d0,0.d0,1.d0
*beam section, elset=b_7, material=mesh_material, section=rect
0.008, 0.00110000000000000007
0.d0,0.d0,1.d0
*beam section, elset=b_11, material=mesh_material, section=rect
0.008, 0.00005000000000000000
0.d0,0.d0,1.d0
*beam section, elset=b_13, material=mesh_material, section=rect
0.008, 0.00495000000000000041
0.d0,0.d0,1.d0
*beam section, elset=b_19, material=mesh_material, section=rect
0.008, 0.00005000000000000000
0.d0,0.d0,1.d0
*beam section, elset=b_20, material=mesh_material, section=rect
0.008, 0.00005000000000000000
0.d0,0.d0,1.d0
*beam section, elset=b_21, material=mesh_material, section=rect
0.008, 0.00120000000000000011
0.d0,0.d0,1.d0
*beam section, elset=b_22, material=mesh_material, section=rect
0.008, 0.00005000000000000000
0.d0,0.d0,1.d0
*beam section, elset=b_23, material=mesh_material, section=rect
0.008, 0.00340000000000000024
0.d0,0.d0,1.d0
*beam section, elset=b_24, material=mesh_material, section=rect
0.008, 0.00120000000000000011
0.d0,0.d0,1.d0
*beam section, elset=b_26, material=mesh_material, section=rect
0.008, 0.00110000000000000007
0.d0,0.d0,1.d0
*beam section, elset=b_28, material=mesh_material, section=rect
0.008, 0.00005000000000000000
0.d0,0.d0,1.d0
*beam section, elset=b_30, material=mesh_material, section=rect
0.008, 0.00005000000000000000
0.d0,0.d0,1.d0
*beam section, elset=b_32, material=mesh_material, section=rect
0.008, 0.00495000000000000041
0.d0,0.d0,1.d0
*beam section, elset=b_41, material=mesh_material, section=rect
0.008, 0.00005000000000000000
0.d0,0.d0,1.d0
*beam section, elset=b_43, material=mesh_material, section=rect
0.008, 0.00120000000000000011
0.d0,0.d0,1.d0
*beam section, elset=b_44, material=mesh_material, section=rect
0.008, 0.00110000000000000007
0.d0,0.d0,1.d0
*beam section, elset=b_45, material=mesh_material, section=rect
0.008, 0.00340000000000000024
0.d0,0.d0,1.d0
*beam section, elset=b_46, material=mesh_material, section=rect
0.008, 0.00340000000000000024
0.d0,0.d0,1.d0
*beam section, elset=b_47, material=mesh_material, section=rect
0.008, 0.00495000000000000041
0.d0,0.d0,1.d0
*beam section, elset=b_48, material=mesh_material, section=rect
0.008, 0.00474999999999999988
0.d0,0.d0,1.d0
*beam section, elset=b_49, material=mesh_material, section=rect
0.008, 0.00340000000000000024
0.d0,0.d0,1.d0
*beam section, elset=b_50, material=mesh_material, section=rect
0.008, 0.00474999999999999988
0.d0,0.d0,1.d0
*beam section, elset=b_51, material=mesh_material, section=rect
0.008, 0.00340000000000000024
0.d0,0.d0,1.d0
*beam section, elset=b_52, material=mesh_material, section=rect
0.008, 0.00474999999999999988
0.d0,0.d0,1.d0
*beam section, elset=b_53, material=mesh_material, section=rect
0.008, 0.00005000000000000000
0.d0,0.d0,1.d0
*beam section, elset=b_54, material=mesh_material, section=rect
0.008, 0.00110000000000000007
0.d0,0.d0,1.d0
*beam section, elset=b_55, material=mesh_material, section=rect
0.008, 0.00150000000000000003
0.d0,0.d0,1.d0
*beam section, elset=b_56, material=mesh_material, section=rect
0.008, 0.00110000000000000007
0.d0,0.d0,1.d0
*beam section, elset=b_60, material=mesh_material, section=rect
0.008, 0.00005000000000000000
0.d0,0.d0,1.d0
*beam section, elset=b_64, material=mesh_material, section=rect
0.008, 0.00005000000000000000
0.d0,0.d0,1.d0
*beam section, elset=b_65, material=mesh_material, section=rect
0.008, 0.00340000000000000024
0.d0,0.d0,1.d0
*beam section, elset=b_66, material=mesh_material, section=rect
0.008, 0.00110000000000000007
0.d0,0.d0,1.d0
*beam section, elset=b_67, material=mesh_material, section=rect
0.008, 0.00110000000000000007
0.d0,0.d0,1.d0
*beam section, elset=b_68, material=mesh_material, section=rect
0.008, 0.00474999999999999988
0.d0,0.d0,1.d0
*beam section, elset=b_69, material=mesh_material, section=rect
0.008, 0.00110000000000000007
0.d0,0.d0,1.d0
*beam section, elset=b_70, material=mesh_material, section=rect
0.008, 0.00150000000000000003
0.d0,0.d0,1.d0
*beam section, elset=b_71, material=mesh_material, section=rect
0.008, 0.00005000000000000000
0.d0,0.d0,1.d0
*beam section, elset=b_72, material=mesh_material, section=rect
0.008, 0.00150000000000000003
0.d0,0.d0,1.d0
*beam section, elset=b_73, material=mesh_material, section=rect
0.008, 0.00350000000000000007
0.d0,0.d0,1.d0
*beam section, elset=b_74, material=mesh_material, section=rect
0.008, 0.00160000000000000008
0.d0,0.d0,1.d0
*beam section, elset=b_75, material=mesh_material, section=rect
0.008, 0.00150000000000000003
0.d0,0.d0,1.d0
*beam section, elset=b_78, material=mesh_material, section=rect
0.008, 0.00005000000000000000
0.d0,0.d0,1.d0
*beam section, elset=b_80, material=mesh_material, section=rect
0.008, 0.00340000000000000024
0.d0,0.d0,1.d0
*beam section, elset=b_81, material=mesh_material, section=rect
0.008, 0.00160000000000000008
0.d0,0.d0,1.d0
*boundary
1, 3,5
2, 3,5
3, 3,5
4, 3,5
5, 3,5
8, 3,5
9, 3,5
10, 3,5
11, 3,5
12, 3,5
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*boundary
2, 2
2, 6
3, 2
3, 6
4, 2
4, 6
5, 2
5, 6
1, 2
1, 6
29, 1
29, 2
32, 1
32, 2
*step, nlgeom
*static
*cload
1, 1, 100.0
20, 2, 5.0
21, 2, 5.0
*el print, elset=elall
s
*node file, output=2d, nset=nall
u
*el file, elset=elall
s,noe
*end step
